Φ := 13 deg
cos(Φ) = 0.97437
P := 1.374 MW
Q := 0.6256 MW
S := sqrt(P^2 + Q^2) = 1509719 W
P/S = 0.910103
P_MV1 := 1.524 MW
Q_MV1 := -0.738 MW
pf_new := 0.95
f := 50 Hz
V_MV := 0.4 kV
S_MV1 := sqrt(P_MV1^2 + Q_MV1^2) = 1.69329 MW
pf_old := P_MV1/S_MV1 = 0.900025
S_MV1new := P_MV1/pf_new = 1.60421 MW
Q_MV1new := S_MV1new*sin(acos(pf_new)) = 0.500915 MW
Q_MV1comp := Q_MV1 - Q_MV1new = -1.23891 MW
C_MV1 := Q_MV1comp/(2*π*f*V_MV^2) = -24647.4 μF
Q_MV1comp/5 = -0.247783 MW
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