# Validering af model
# Voltage drop calculation
# Windfarm
S_wind := 5.51*10^3 kV*A
V_wind := 33 kV
χ'_dwind := 0.33
pf_wind := 0.9
c := 1.1
X''Rratio := 10
ϕ_wind := acos(pf_wind) = 0.451027
Kg_wind := 1*c/(1 + χ'_dwind*sin(ϕ_wind)) = 0.96167
X'_dwind := χ'_dwind*Kg_wind*V_wind^2/S_wind = 62.7215 Ω
R_g := X'_dwind/X''Rratio = 6.27215 Ω
# Synkron generator
S_pp := 6.01*10^3 kV*A
V_pp := 33 kV
χ'_dpp := 0.232
pf_pp := 0.8
ϕ_pp := acos(pf_pp) = 0.643501
Kg_pp := 1*c/(1 + χ'_dpp*sin(ϕ_pp)) = 0.96559
X'_dpp := χ'_dpp*Kg_pp*V_pp^2/S_pp = 40.5914 Ω
R_pp := X'_dpp/X''Rratio = 4.05914 Ω
Z_pp := R_pp + X'_dpp*1i = (4.05914 + 40.5914i) Ω
# Transformer 15MVA 33/150kV
S_T1 := 15*10^3 kV*A
V_T1HV := 150 kV
V_T1LV := 33 kV
U_kT1 := 0.0802
P_T1 := 50 kW
Z_T1 := U_kT1*V_T1HV^2/S_T1 = 120.3 Ω
I_T1 := S_T1/(V_T1HV*sqrt(3)) = 57.735 A
R_T1 := P_T1/(3*I_T1^2) = 5 Ω
X_T1 := sqrt(Z_T1^2 - R_T1^2) = 120.196 Ω
Z_T1 := R_T1 + X_T1*1i = (5 + 120.196i) Ω
# Transformer 15MVA 150/60kV
S_T2 := 15*10^3 kV*A
V_T2HV := 150 kV
V_T2LV := 60 kV
U_kT2 := 0.0802
P_T2 := 50 kW
Z_T2 := U_kT2*V_T2HV^2/S_T2 = 120.3 Ω
I_T2 := S_T2/(V_T2HV*sqrt(3)) = 57.735 A
R_T2 := P_T2/(3*I_T2^2) = 5 Ω
X_T2 := sqrt(Z_T2^2 - R_T2^2) = 120.196 Ω
Z_T2 := R_T2 + X_T2*1i = (5 + 120.196i) Ω
# Transformer 15MVA 60/10kV
S_T3 := 15*10^3 kV*A
V_T3HV := 60 kV
V_T3LV := 10 kV
U_kT3 := 0.0802
P_T3 := 50 kW
Z_T3 := U_kT3*V_T3HV^2/S_T3 = 19.248 Ω
I_T3 := S_T3/(V_T3HV*sqrt(3)) = 144.338 A
R_T3 := P_T3/(3*I_T3^2) = 0.8 Ω
X_T3 := sqrt(Z_T3^2 - R_T3^2) = 19.2314 Ω
Z_T3 := (R_T3 + X_T3*1i) = (0.8 + 19.2314i) Ω
# Transformer 2.5MVA 10/0.4kV
S_T4 := 2.5*10^3 kV*A
V_T4HV := 10 kV
V_T4LV := 0.4 kV
U_kT4 := 0.06
P_T4 := 19 kW
Z_T4 := U_kT4*V_T4HV^2/S_T4 = 2.4 Ω
I_T4 := S_T4/(V_T4HV*sqrt(3)) = 144.338 A
R_T4 := P_T4/(3*I_T4^2) = 0.304 Ω
X_T4 := sqrt(Z_T4^2 - R_T4^2) = 2.38067 Ω
Z_T4 := (R_T4 + X_T4*1i) = (0.304 + 2.38067i) Ω
# Transmission cable 150kV
R_150kV := 0.194 Ω/km
X_150kV := 0.4 Ω/km
L_c150kV := 50 km
R_c150kV := R_150kV*L_c150kV = 9.7 Ω
X_c150kV := X_150kV*L_c150kV = 20 Ω
Z_c150kV := R_c150kV + X_c150kV*1i = (9.7 + 20i) Ω
# Transmission cable 60kV
R_60kV := 0.8342 Ω/km
X_60kV := 0.43 Ω/km
L_c60kV := 20 km
R_c60kV := R_60kV*L_c60kV = 16.684 Ω
X_c60kV := X_60kV*L_c60kV = 8.6 Ω
Z_c60kV := R_c60kV + X_c60kV*1i = (16.684 + 8.6i) Ω
# Windfarm cable 33kV
R_33kV := 0.1021 Ω/km
X_33kV := 0.1445 Ω/km
L_c33kV := 35 km
R_c33kV := R_33kV*L_c33kV = 3.5735 Ω
X_c33kV := X_33kV*L_c33kV = 5.0575 Ω
Z_c33kV := R_c33kV + X_c33kV*1i = (3.5735 + 5.0575i) Ω
# Distribution cable 10kV
R_10kV := 0.1571 Ω/km
X_10kV := 0.31 Ω/km
L_c10kV := 10 km
R_c10kV := R_10kV*L_c10kV = 1.571 Ω
X_c10kV := X_10kV*L_c10kV = 3.1 Ω
Z_c10kV := R_c10kV + X_c10kV*1i = (1.571 + 3.1i) Ω
# Byer
P_by := 0.5 MW
Q_by := 0.242 MW
S_by := sqrt(P_by^2 + Q_by^2) = 0.555485 MW
V_by := 0.333 kV
Z_by := V_by^2/S_by = 0.199625 Ω
R_by := Z_by*P_by/S_by = 0.179686 Ω
X_by := sqrt(Z_by^2 - R_by^2) = 0.0869678 Ω
Z_by := R_by + X_by*1i = (0.179686 + 0.0869678i) Ω
# Equivalent circuit
# Source impedance
a_1 := V_T1LV/V_T1HV = 0.22
a_2 := V_T2LV/V_T2HV = 0.4
a_3 := V_T3LV/V_T3HV = 0.166667
a_4 := V_T4LV/V_T4HV
Z_pp' := Z_pp*(1/a_1)^2*a_2^2*a_3^2 = (0.37274 + 3.7274i) Ω
Z_T1' := Z_T1*a_2^2*a_3^2 = (0.0222222 + 0.534205i) Ω
Z_c150kV' := Z_c150kV*a_2^2*a_3^2 = (0.0431111 + 0.0888889i) Ω
Z_T2' := Z_T2*a_2^2*a_3^2 = (0.0222222 + 0.534205i) Ω
Z_c60kV' := Z_c60kV*a_3^2 = (0.463444 + 0.238889i) Ω
Z_T3' := Z_T3*a_3^2 = (0.0222222 + 0.534205i) Ω
Z_source := Z_T1' + Z_c150kV' + Z_T2' + Z_c60kV' + Z_T3' = (0.573222 + 1.93039i) Ω
# Load impedance
Z_by' := Z_by*(1/a_4)^2 = (112.303 + 54.3549i) Ω
Z_load := Z_c10kV + 1/((Z_c10kV + 1/((Z_c10kV + Z_T4 + Z_by')^-1 + (Z_T4 + Z_by')^-1))^-1 + (Z_T4 + Z_by')^-1 + (Z_c10kV + 1/((Z_c10kV + Z_T4 + Z_by')^-1 + (Z_T4 + Z_by')^-1))^-1) = (24.7244 + 15.6647i) Ω
Z_load = (24.7244 + 15.6647i) Ω
# Spændingsfald
# Beregning
V_10kVact := V_T4HV*Z_load/(Z_load + Z_source) = (9.48959 - 0.408068i) kV
# Simulering
V_10kVsim := (9.452 ∠ -2.465 deg) kV
V_10kVpu := 0.945
# SC calculation
# Synkron gennerator kortslutningsimpedans
S_pp := 6.01*10^3 kV*A
V_pp := 33 kV
χ''_dpp := 0.12
pf_pp := 0.8
S_ppSC := S_pp/χ''_dpp = 50.0833 MW
ϕ_pp := acos(pf_pp) = 0.643501
Kg_pp := 1*c/(1 + χ''_dpp*sin(ϕ_pp)) = 1.02612
X''_dpp := χ''_dpp*Kg_pp*V_pp^2/S_pp = 22.3117 Ω
R_pp := X''_dpp/X''Rratio = 2.23117 Ω
Z_ppSC := R_pp + X''_dpp*1i = (2.23117 + 22.3117i) Ω
# System kortslutningsimpedans
Z_ppSC' := Z_ppSC*(1/a_1)^2*a_2^2*a_3^2 = (0.204882 + 2.04882i) Ω
Z_SC := Z_ppSC' + Z_T1' + Z_c150kV' + Z_T2' + Z_c60kV' + Z_T3' = (0.778105 + 3.97922i) Ω
# Beregning
I_SCact := |c*V_T3LV/(sqrt(3)*Z_SC)| = 1.56634 kA
# Simulering
I_SCsim := 1.57 kA
